// COMSOL Multiphysics 6.4.0.343 model "GAS_DYNAMICS.mph"
// Outline of the model tree

Parameters
  f0 = 40[kHz]
  c_min = 250[m/s]
  lam_min = c_min/f0
  c_N2 = 348.93[m/s]
  lam0 = c_N2/f0
  p_focused = 525.95[Pa]
  p_vortex = 903.59[Pa]

Functions
  rm1: Ramp | slope = 20; plotlowerlimit = -0.055; plotupperlimit = 0.105
  rect1: Rectangle | lower = -2.5[mm]; upper = 2.5[mm]; smooth = 2.5[mm]; plotlowerlimit = -0.0075; plotupperlimit = 0.0075

Variables
  var1 "Variables 1"
    Z_aco = acpr.c*acpr.rho  // Characteristic acoustic impedance
    beta_s = 1/(acpr.rho*acpr.c^2)  // Isentropic compressibility
    F_aco_beta_s_x = -0.25*realdot(acpr.p_t,acpr.p_t)*d(beta_s,x)
    F_aco_beta_s_y = -0.25*realdot(acpr.p_t,acpr.p_t)*d(beta_s,y)
    F_aco_rho_x = -0.25*(realdot(acpr.v_tx,acpr.v_tx)+realdot(acpr.v_ty,acpr.v_ty))*d(acpr.rho,x)
    F_aco_rho_y = -0.25*(realdot(acpr.v_tx,acpr.v_tx)+realdot(acpr.v_ty,acpr.v_ty))*d(acpr.rho,y)
    F_aco_x = F_aco_beta_s_x + F_aco_rho_x
    F_aco_y = F_aco_beta_s_y + F_aco_rho_y
    Gamma = if(isdefined(acpr.mu)*isdefined(acpr.muB),(4/3+acpr.muB/acpr.mu)*acpr.mu*acpr.omega/(acpr.rho*acpr.c^2),0)  // Viscous damping coefficient
    F_streaming_x = Gamma*acpr.omega/acpr.c^2*0.5*realdot(acpr.p_t,acpr.v_tx)
    F_streaming_y = Gamma*acpr.omega/acpr.c^2*0.5*realdot(acpr.p_t,acpr.v_ty)

Couplings
  maxop1: Maximum on domains 1

Geometry
  geom1 "Geometry 1" (2D, length unit mm)
    c1: Circle | r = 20
    fin: Finalize "Form Union"

Physics
  chem: Chemistry "Chemistry 1: He" on all domains
    mixture.ConcentrationType = MassFraction
    mixture.liquidDensitySel = Thermodynamics
    mixture.gasDensitySel = Thermodynamics
    mixture.Thermodynamics = 1
    mixture.PropertyPackage = pp1
    mixture.FullyCoupled = 1
    ChemistryModelInputParameter.MassTransfer = tcs
    ChemistryModelInputParameter.Species = {He, N2}
    ChemistryModelInputParameter.SpeciesInputType = {Free species, Free species}
    ChemistryModelInputParameter.ConcentrationInput = {He_1, N2_1}
    ChemistryModelInputParameter.ConcentrationValue = {Solved for, Solved for}
    ChemistryModelInputParameter.PackageSpecies = {helium, nitrogen}
    ChemistryModelInputParameter.Notes = {Constant, Constant}
    ChemistryModelInputParameter.Unit = {1, 1}
    ChemistryModelInputParameter.SpeciesMatching = {"He,helium", "N2,nitrogen"}
    ChemistryModelInputParameter.uselog = {1, 1}
    calcTransport.heatCapacitySel = Thermodynamics
    calcTransport.dynamicViscositySel = Thermodynamics
    calcTransport.thermalConductivitySel = Thermodynamics
    calcTransport.gammaSel = Thermodynamics
    ActiveSpecies.SumActiveSpecies = 2
    ActiveSpecies.NumActiveVolumeSpecies = 2
    N2: SpeciesChem "Species: N2" on all domains
      sisDef = 1
      specLabel = N2
      speciesEnthalpy = Thermodynamics
      GasThermalConductivitySel = Thermodynamics
      GasDiffusivitySel = Thermodynamics
      LiquidDiffusivitySel = Thermodynamics
      textSpeciesNameInput = Species: N2
      textSpecName = Variable name: N2
      nameForSourceFeature = N2
      enableChemicalFormulaCheckbox = 1
      chemicalFormula = N2
      specName = N2
      Thermodynamics = 1
      mixtureSolvent = 6
    He: SpeciesChem "Species: He" on all domains
      sisDef = 1
      specLabel = He
      speciesEnthalpy = Thermodynamics
      GasThermalConductivitySel = Thermodynamics
      GasDiffusivitySel = Thermodynamics
      LiquidDiffusivitySel = Thermodynamics
      textSpeciesNameInput = Species: He
      textSpecName = Variable name: He
      nameForSourceFeature = He
      enableChemicalFormulaCheckbox = 1
      chemicalFormula = He
      specName = He
      Thermodynamics = 1
      mixtureSolvent = 6
      transportparameterGroup = 1
  chem2: Chemistry "Chemistry 2: N2O" on all domains
    mixture.ConcentrationType = MassFraction
    mixture.liquidDensitySel = Thermodynamics
    mixture.gasDensitySel = Thermodynamics
    mixture.Thermodynamics = 1
    mixture.PropertyPackage = pp2
    mixture.FullyCoupled = 1
    ChemistryModelInputParameter.MassTransfer = tcs2
    ChemistryModelInputParameter.Species = {N2, N2O}
    ChemistryModelInputParameter.SpeciesInputType = {Free species, Free species}
    ChemistryModelInputParameter.ConcentrationInput = {N2_2, N2O_2}
    ChemistryModelInputParameter.ConcentrationValue = {Solved for, Solved for}
    ChemistryModelInputParameter.PackageSpecies = {nitrogen, nitrous oxide}
    ChemistryModelInputParameter.Notes = {Constant, Constant}
    ChemistryModelInputParameter.Unit = {1, 1}
    ChemistryModelInputParameter.SpeciesMatching = {"N2,nitrogen", "N2O,nitrous oxide"}
    ChemistryModelInputParameter.uselog = {0.5, 0.5}
    calcTransport.heatCapacitySel = Thermodynamics
    calcTransport.dynamicViscositySel = Thermodynamics
    calcTransport.thermalConductivitySel = Thermodynamics
    calcTransport.gammaSel = Thermodynamics
    ActiveSpecies.SumActiveSpecies = 2
    ActiveSpecies.NumActiveVolumeSpecies = 2
    N2: SpeciesChem "Species: N2" on all domains
      sisDef = 1
      specLabel = N2
      speciesEnthalpy = Thermodynamics
      GasThermalConductivitySel = Thermodynamics
      GasDiffusivitySel = Thermodynamics
      LiquidDiffusivitySel = Thermodynamics
      textSpeciesNameInput = Species: N2
      textSpecName = Variable name: N2
      nameForSourceFeature = N2
      enableChemicalFormulaCheckbox = 1
      chemicalFormula = N2
      specName = N2
      Thermodynamics = 1
      mixtureSolvent = 6
    N2O: SpeciesChem "Species: N2O" on all domains
      sisDef = 1
      specLabel = N2O
      speciesEnthalpy = Thermodynamics
      GasThermalConductivitySel = Thermodynamics
      GasDiffusivitySel = Thermodynamics
      LiquidDiffusivitySel = Thermodynamics
      textSpeciesNameInput = Species: N2O
      textSpecName = Variable name: N2O
      nameForSourceFeature = N2O
      enableChemicalFormulaCheckbox = 1
      chemicalFormula = N2O
      specName = N2O
      Thermodynamics = 1
      mixtureSolvent = 6
  chem3: Chemistry "Chemistry 3: CH4" on all domains
    mixture.ConcentrationType = MassFraction
    mixture.liquidDensitySel = Thermodynamics
    mixture.gasDensitySel = Thermodynamics
    mixture.Thermodynamics = 1
    mixture.PropertyPackage = pp3
    mixture.FullyCoupled = 1
    ChemistryModelInputParameter.MassTransfer = tcs3
    ChemistryModelInputParameter.Species = {CH4, N2}
    ChemistryModelInputParameter.SpeciesInputType = {Free species, Free species}
    ChemistryModelInputParameter.ConcentrationInput = {CH4, N2_3}
    ChemistryModelInputParameter.ConcentrationValue = {Solved for, Solved for}
    ChemistryModelInputParameter.PackageSpecies = {methane, nitrogen}
    ChemistryModelInputParameter.Notes = {Constant, Constant}
    ChemistryModelInputParameter.Unit = {1, 1}
    ChemistryModelInputParameter.SpeciesMatching = {"CH4,methane", "N2,nitrogen"}
    ChemistryModelInputParameter.uselog = {0.5, 0.5}
    calcTransport.heatCapacitySel = Thermodynamics
    calcTransport.dynamicViscositySel = Thermodynamics
    calcTransport.thermalConductivitySel = Thermodynamics
    calcTransport.gammaSel = Thermodynamics
    ActiveSpecies.SumActiveSpecies = 2
    ActiveSpecies.NumActiveVolumeSpecies = 2
    CH4: SpeciesChem "Species: CH4" on all domains
      sisDef = 1
      specLabel = CH4
      speciesEnthalpy = Thermodynamics
      GasThermalConductivitySel = Thermodynamics
      GasDiffusivitySel = Thermodynamics
      LiquidDiffusivitySel = Thermodynamics
      textSpeciesNameInput = Species: CH4
      textSpecName = Variable name: CH4
      nameForSourceFeature = CH4
      enableChemicalFormulaCheckbox = 1
      chemicalFormula = CH4
      specName = CH4
      Thermodynamics = 1
      mixtureSolvent = 6
    N2: SpeciesChem "Species: N2" on all domains
      sisDef = 1
      specLabel = N2
      speciesEnthalpy = Thermodynamics
      GasThermalConductivitySel = Thermodynamics
      GasDiffusivitySel = Thermodynamics
      LiquidDiffusivitySel = Thermodynamics
      textSpeciesNameInput = Species: N2
      textSpecName = Variable name: N2
      nameForSourceFeature = N2
      enableChemicalFormulaCheckbox = 1
      chemicalFormula = N2
      specName = N2
      Thermodynamics = 1
      mixtureSolvent = 6
  chem4: Chemistry "Chemistry 4: H2" on all domains
    mixture.ConcentrationType = MassFraction
    mixture.liquidDensitySel = Thermodynamics
    mixture.gasDensitySel = Thermodynamics
    mixture.Thermodynamics = 1
    mixture.PropertyPackage = pp4
    mixture.FullyCoupled = 1
    ChemistryModelInputParameter.MassTransfer = tcs4
    ChemistryModelInputParameter.Species = {H2, N2}
    ChemistryModelInputParameter.SpeciesInputType = {Free species, Free species}
    ChemistryModelInputParameter.ConcentrationInput = {H2, N2_4}
    ChemistryModelInputParameter.ConcentrationValue = {Solved for, Solved for}
    ChemistryModelInputParameter.PackageSpecies = {hydrogen, nitrogen}
    ChemistryModelInputParameter.Notes = {Constant, Constant}
    ChemistryModelInputParameter.Unit = {1, 1}
    ChemistryModelInputParameter.SpeciesMatching = {"H2,hydrogen", "N2,nitrogen"}
    ChemistryModelInputParameter.uselog = {0.5, 0.5}
    calcTransport.heatCapacitySel = Thermodynamics
    calcTransport.dynamicViscositySel = Thermodynamics
    calcTransport.thermalConductivitySel = Thermodynamics
    calcTransport.gammaSel = Thermodynamics
    ActiveSpecies.SumActiveSpecies = 2
    ActiveSpecies.NumActiveVolumeSpecies = 2
    H2: SpeciesChem "Species: H2" on all domains
      sisDef = 1
      specLabel = H2
      speciesEnthalpy = Thermodynamics
      GasThermalConductivitySel = Thermodynamics
      GasDiffusivitySel = Thermodynamics
      LiquidDiffusivitySel = Thermodynamics
      textSpeciesNameInput = Species: H2
      textSpecName = Variable name: H2
      nameForSourceFeature = H2
      enableChemicalFormulaCheckbox = 1
      chemicalFormula = H2
      specName = H2
      Thermodynamics = 1
      mixtureSolvent = 6
    N2: SpeciesChem "Species: N2" on all domains
      sisDef = 1
      specLabel = N2
      speciesEnthalpy = Thermodynamics
      GasThermalConductivitySel = Thermodynamics
      GasDiffusivitySel = Thermodynamics
      LiquidDiffusivitySel = Thermodynamics
      textSpeciesNameInput = Species: N2
      textSpecName = Variable name: N2
      nameForSourceFeature = N2
      enableChemicalFormulaCheckbox = 1
      chemicalFormula = N2
      specName = N2
      Thermodynamics = 1
      mixtureSolvent = 6
  chem5: Chemistry "Chemistry 5: CO2" on all domains
    mixture.ConcentrationType = MassFraction
    mixture.liquidDensitySel = Thermodynamics
    mixture.gasDensitySel = Thermodynamics
    mixture.Thermodynamics = 1
    mixture.PropertyPackage = pp5
    mixture.FullyCoupled = 1
    ChemistryModelInputParameter.MassTransfer = tcs5
    ChemistryModelInputParameter.Species = {CO2, N2}
    ChemistryModelInputParameter.SpeciesInputType = {Free species, Free species}
    ChemistryModelInputParameter.ConcentrationInput = {CO2, N2_5}
    ChemistryModelInputParameter.ConcentrationValue = {Solved for, Solved for}
    ChemistryModelInputParameter.PackageSpecies = {carbon dioxide, nitrogen}
    ChemistryModelInputParameter.Notes = {Constant, Constant}
    ChemistryModelInputParameter.Unit = {1, 1}
    ChemistryModelInputParameter.SpeciesMatching = {"CO2,carbon dioxide", "N2,nitrogen"}
    ChemistryModelInputParameter.uselog = {0.5, 0.5}
    calcTransport.heatCapacitySel = Thermodynamics
    calcTransport.dynamicViscositySel = Thermodynamics
    calcTransport.thermalConductivitySel = Thermodynamics
    calcTransport.gammaSel = Thermodynamics
    ActiveSpecies.SumActiveSpecies = 2
    ActiveSpecies.NumActiveVolumeSpecies = 2
    CO2: SpeciesChem "Species: CO2" on all domains
      sisDef = 1
      specLabel = CO2
      speciesEnthalpy = Thermodynamics
      GasThermalConductivitySel = Thermodynamics
      GasDiffusivitySel = Thermodynamics
      LiquidDiffusivitySel = Thermodynamics
      textSpeciesNameInput = Species: CO2
      textSpecName = Variable name: CO2
      nameForSourceFeature = CO2
      enableChemicalFormulaCheckbox = 1
      chemicalFormula = CO2
      specName = CO2
      Thermodynamics = 1
      mixtureSolvent = 6
    N2: SpeciesChem "Species: N2" on all domains
      sisDef = 1
      specLabel = N2
      speciesEnthalpy = Thermodynamics
      GasThermalConductivitySel = Thermodynamics
      GasDiffusivitySel = Thermodynamics
      LiquidDiffusivitySel = Thermodynamics
      textSpeciesNameInput = Species: N2
      textSpecName = Variable name: N2
      nameForSourceFeature = N2
      enableChemicalFormulaCheckbox = 1
      chemicalFormula = N2
      specName = N2
      Thermodynamics = 1
      mixtureSolvent = 6
  chem6: Chemistry "Chemistry 6: Xe" on all domains
    TPFeatureInput.T_src = root.comp1.nirf6.T
    mixture.ConcentrationType = MassFraction
    mixture.liquidDensitySel = Thermodynamics
    mixture.gasDensitySel = Thermodynamics
    mixture.Thermodynamics = 1
    mixture.PropertyPackage = pp6
    mixture.FullyCoupled = 1
    ChemistryModelInputParameter.MassTransfer = tcs6
    ChemistryModelInputParameter.Species = {N2, Xe}
    ChemistryModelInputParameter.SpeciesInputType = {Free species, Free species}
    ChemistryModelInputParameter.ConcentrationInput = {N2_6, Xe}
    ChemistryModelInputParameter.ConcentrationValue = {Solved for, Solved for}
    ChemistryModelInputParameter.PackageSpecies = {nitrogen, xenon}
    ChemistryModelInputParameter.Notes = {Constant, Constant}
    ChemistryModelInputParameter.Unit = {1, 1}
    ChemistryModelInputParameter.SpeciesMatching = {"N2,nitrogen", "Xe,xenon"}
    ChemistryModelInputParameter.uselog = {0.5, 0.5}
    calcTransport.heatCapacitySel = Thermodynamics
    calcTransport.dynamicViscositySel = Thermodynamics
    calcTransport.thermalConductivitySel = Thermodynamics
    calcTransport.gammaSel = Thermodynamics
    ActiveSpecies.SumActiveSpecies = 2
    ActiveSpecies.NumActiveVolumeSpecies = 2
    Xe: SpeciesChem "Species: Xe" on all domains
      sisDef = 1
      specLabel = Xe
      speciesEnthalpy = Thermodynamics
      GasThermalConductivitySel = Thermodynamics
      GasDiffusivitySel = Thermodynamics
      LiquidDiffusivitySel = Thermodynamics
      textSpeciesNameInput = Species: Xe
      textSpecName = Variable name: Xe
      nameForSourceFeature = Xe
      enableChemicalFormulaCheckbox = 1
      chemicalFormula = Xe
      specName = Xe
      Thermodynamics = 1
      mixtureSolvent = 6
    N2: SpeciesChem "Species: N2" on all domains
      sisDef = 1
      specLabel = N2
      speciesEnthalpy = Thermodynamics
      GasThermalConductivitySel = Thermodynamics
      GasDiffusivitySel = Thermodynamics
      LiquidDiffusivitySel = Thermodynamics
      textSpeciesNameInput = Species: N2
      textSpecName = Variable name: N2
      nameForSourceFeature = N2
      enableChemicalFormulaCheckbox = 1
      chemicalFormula = N2
      specName = N2
      Thermodynamics = 1
      mixtureSolvent = 6
      transportparameterGroup = 1
  tcs: ConcentratedSpecies "Transport of Concentrated Species 1: He" on all domains
    dependent variable N2_1 = {N2_1, He_1}
    sp1: SpeciesProperties "Species Molar Masses 1" (default)
      M_N2_1_src = root.comp1.chem.M_N2
      M_He_1_src = root.comp1.chem.M_He
    cdm1: Fluid (default)
      rho_src = root.comp1.chem.rho_chem
      u_src = root.comp1.u2
      Dik = {1, comp1.chem.D_He_N2, comp1.chem.D_He_N2, 1}
      DF = comp1.chem.D_He_N2
      DiffusivityFrom = comp1.chem.D_He_N2
    init1: init "Initial Values 1 - N2 only" (default) | w0 = {0.1, 0}
    nflx1: NoFlux (default)
    init2: init "Initial Values 2 - Central distribution, helium" on all domains | w0 = {0.1, rect1(sqrt(y^2+x^2))}
    init3: init "Initial Values 3 - Offset distribution, helium" on domains 1
      w0 = {0.1, rect1(sqrt((y-(lam0/5))^2+x^2))}
  tcs2: ConcentratedSpecies "Transport of Concentrated Species 2: N2O" on all domains
    dependent variable N2_2 = {N2_2, N2O_2}
    sp1: SpeciesProperties "Species Molar Masses 1" (default)
      M_N2_2_src = root.comp1.chem2.M_N2
      M_N2O_2_src = root.comp1.chem2.M_N2O
    cdm1: Fluid (default) | Species2 = w3
    init1: init "Initial Values 1 - N2 only" (default) | w0 = {0.1, 0}
    nflx1: NoFlux (default)
    init2: init "Initial Values 2 - Central distribution, N2O" on all domains | w0 = {0.1, rect1(sqrt(y^2+x^2))}
    init3: init "Initial Values 3 - Offset distribution, N2O" on all domains | w0 = {0.1, rect1(sqrt((y-(lam0/5))^2+x^2))}
  tcs3: ConcentratedSpecies "Transport of Concentrated Species 3: CH4" on all domains
    dependent variable CH4 = {CH4, N2_3}
    SpeciesProperties.FromMassConstraint = 2
    sp1: SpeciesProperties "Species Molar Masses 1" (default)
      M_CH4_src = root.comp1.chem3.M_CH4
      M_N2_3_src = root.comp1.chem3.M_N2
    cdm1: Fluid (default)
      rho_src = root.comp1.chem3.rho_chem
      Dik = {1, comp1.chem3.D_CH4_N2, comp1.chem3.D_CH4_N2, 1}
      Species2 = w3
      DF = comp1.chem3.D_CH4_N2
      DiffusivityFrom = comp1.chem3.D_CH4_N2
    init1: init "Initial Values 1 - N2 only" (default) | w0 = {0, 0}
    nflx1: NoFlux (default)
    init2: init "Initial Values 2 - Central distribution, CH4" on all domains
      w0 = {rect1(sqrt(y^2+x^2)), rect1(sqrt(y^2+x^2))}
    init3: init "Initial Values 3 - Offset distribution, CH4" on all domains
      w0 = {rect1(sqrt((y-(lam0/5))^2+x^2)), rect1(sqrt((y-(lam0/6))^2+x^2))}
  tcs4: ConcentratedSpecies "Transport of Concentrated Species 4: H2" on all domains
    dependent variable H2 = {H2, N2_4}
    SpeciesProperties.FromMassConstraint = 2
    sp1: SpeciesProperties "Species Molar Masses 1" (default)
      M_H2_src = root.comp1.chem4.M_H2
      M_N2_4_src = root.comp1.chem4.M_N2
    cdm1: Fluid (default)
      rho_src = root.comp1.chem4.rho_chem
      Dik = {1, comp1.chem4.D_H2_N2, comp1.chem4.D_H2_N2, 1}
      Species2 = w3
      DF = comp1.chem4.D_H2_N2
      DiffusivityFrom = comp1.chem4.D_H2_N2
    init1: init "Initial Values 1 - N2 only" (default) | w0 = {0.1, 0}
    nflx1: NoFlux (default)
    init2: init "Initial Values 2 - Central distribution, H2" on all domains
      w0 = {rect1(sqrt(y^2+x^2)), rect1(sqrt(y^2+x^2))}
    init3: init "Initial Values 3 - Offset distribution, H2" on all domains
      w0 = {rect1(sqrt((y-(lam0/5))^2+x^2)), rect1(sqrt((y-(lam0/6))^2+x^2))}
  tcs5: ConcentratedSpecies "Transport of Concentrated Species 5: CO2" on all domains
    dependent variable CO2 = {CO2, N2_5}
    SpeciesProperties.FromMassConstraint = 2
    sp1: SpeciesProperties "Species Molar Masses 1" (default)
      M_CO2_src = root.comp1.chem5.M_CO2
      M_N2_5_src = root.comp1.chem5.M_N2
    cdm1: Fluid (default)
      rho_src = root.comp1.chem5.rho_chem
      Dik = {1, comp1.chem5.D_CO2_N2, comp1.chem5.D_CO2_N2, 1}
      Species2 = w3
      DF = comp1.chem5.D_CO2_N2
      DiffusivityFrom = comp1.chem5.D_CO2_N2
    init1: init "Initial Values 1 - N2 only" (default) | w0 = {0.1, 0}
    nflx1: NoFlux (default)
    init2: init "Initial Values 2 - Central distribution, CO2" on all domains
      w0 = {rect1(sqrt(y^2+x^2)), rect1(sqrt(y^2+x^2))}
    init3: init "Initial Values 3 - Offset distribution, CO2" on all domains
      w0 = {rect1(sqrt((y-(lam0/5))^2+x^2)), rect1(sqrt((y-(lam0/6))^2+x^2))}
  tcs6: ConcentratedSpecies "Transport of Concentrated Species 6: Xe" on all domains
    dependent variable Xe = {Xe, N2_6}
    SpeciesProperties.FromMassConstraint = 2
    sp1: SpeciesProperties "Species Molar Masses 1" (default)
      M_Xe_src = root.comp1.chem6.M_Xe
      M_N2_6_src = root.comp1.chem6.M_N2
    cdm1: Fluid (default)
      rho_src = root.comp1.chem6.rho_chem
      Dik = {1, comp1.chem6.D_N2_Xe, comp1.chem6.D_N2_Xe, 1}
      Species2 = w3
      DF = comp1.chem6.D_N2_Xe
      DiffusivityFrom = comp1.chem6.D_N2_Xe
    init1: init "Initial Values 1 - N2 only" (default) | w0 = {0, 0}
    nflx1: NoFlux (default)
    init2: init "Initial Values 2 - Central distribution, Xe" on all domains
      w0 = {rect1(sqrt(y^2+x^2)), rect1(sqrt(y^2+x^2))}
    init3: init "Initial Values 3 - Offset distribution, Xe" on all domains
      w0 = {rect1(sqrt((y-(lam0/5))^2+x^2)), rect1(sqrt((y-(lam0/6))^2+x^2))}
  acpr: PressureAcoustics "Pressure Acoustics, Frequency Domain" on all domains
    dependent variable p1
    EquationForm.form = Frequency
    EquationForm.freq_src = userdef
    EquationForm.freq = f0
    fpam1: FrequencyPressureAcousticsModel "Pressure Acoustics 1 - He" (default)
      FluidModel = Viscothermal
      rho_mat = root.comp1.tcs.rho
      c_mat = userdef
      c = sqrt(chem.gamma*chem.T*R_const/chem.Mn)
      mu_mat = root.comp1.chem.eta
      muB_mat = userdef
      muB = chem.eta*0.6
      kcond_mat = root.comp1.chem.kval
      Cp_mat = root.comp1.chem.Cptot
      gamma_mat = root.comp1.chem.gamma
    shb1: SoundHard "Sound Hard Boundary (Wall) 1" (default)
    init1: init "Initial Values 1" (default)
    cwr1: CylindricalWaveRadiation on boundaries 1-4
      ipf1: IncidentPressureField "Incident Pressure Field 1 - focused" on all boundaries
        pamp = p_focused*rm1(t[1/s])
        c = c_N2
      ipf2: IncidentPressureField "Incident Pressure Field 2 - vortex" on all boundaries
        pamp = p_vortex*exp(i*atan2(x,y))*rm1(t[1/s])
        c = c_N2
    fpam2: FrequencyPressureAcousticsModel "Pressure Acoustics 2 - N20" on all domains
      FluidModel = Viscothermal
      rho_mat = root.comp1.tcs2.rho
      c_mat = userdef
      c = sqrt(chem2.gamma*chem2.T*R_const/chem2.Mn)
      mu_mat = root.comp1.chem2.eta
      muB_mat = userdef
      muB = chem2.eta*0.6
      kcond_mat = root.comp1.chem2.kval
      Cp_mat = root.comp1.chem2.Cptot
      gamma_mat = root.comp1.chem2.gamma
    fpam3: FrequencyPressureAcousticsModel "Pressure Acoustics 3 - CH4" on all domains
      FluidModel = Viscothermal
      rho_mat = root.comp1.tcs3.rho
      c_mat = userdef
      c = sqrt(chem3.gamma*chem3.T*R_const/chem3.Mn)
      mu_mat = root.comp1.chem3.eta
      muB_mat = userdef
      muB = chem3.eta*0.6
      kcond_mat = root.comp1.chem3.kval
      Cp_mat = root.comp1.chem3.Cptot
      gamma_mat = root.comp1.chem3.gamma
    fpam4: FrequencyPressureAcousticsModel "Pressure Acoustics 4 - H2" on all domains
      FluidModel = Viscothermal
      rho_mat = root.comp1.tcs4.rho
      c_mat = userdef
      c = sqrt(chem4.gamma*chem4.T*R_const/chem4.Mn)
      mu_mat = root.comp1.chem4.eta
      muB_mat = userdef
      muB = chem4.eta*0.6
      kcond_mat = root.comp1.chem4.kval
      Cp_mat = root.comp1.chem4.Cptot
      gamma_mat = root.comp1.chem4.gamma
    fpam5: FrequencyPressureAcousticsModel "Pressure Acoustics 5 - CO2" on all domains
      FluidModel = Viscothermal
      rho_mat = root.comp1.tcs5.rho
      c_mat = userdef
      c = sqrt(chem5.gamma*chem5.T*R_const/chem5.Mn)
      mu_mat = root.comp1.chem5.eta
      muB_mat = userdef
      muB = chem5.eta*0.6
      kcond_mat = root.comp1.chem5.kval
      Cp_mat = root.comp1.chem5.Cptot
      gamma_mat = root.comp1.chem5.gamma
    fpam6: FrequencyPressureAcousticsModel "Pressure Acoustics 6 - Xe" on all domains
      FluidModel = Viscothermal
      rho_mat = root.comp1.tcs6.rho
      c_mat = userdef
      c = sqrt(chem6.gamma*chem6.T*R_const/chem6.Mn)
      mu_mat = root.comp1.chem6.eta
      muB_mat = userdef
      muB = chem6.eta*0.6
      kcond_mat = root.comp1.chem6.kval
      Cp_mat = root.comp1.chem6.Cptot
      gamma_mat = root.comp1.chem6.gamma
  spf: LaminarFlow on no domains
    dependent variable u2 = {u2, v2, w2}
    dependent variable p2
    fp1: FluidProperties (default) | rho_mat = root.comp1.chem.rho; mu_mat = root.comp1.chem.eta
    init1: init "Initial Values 1" (default)
    wallbc1: WallBC "Wall 1" (default)
    vf1: VolumeForce "Volume Force 1 - Acoustic force density" on domains 1 | F = {F_aco_x, F_aco_y, 0}
    vf2: VolumeForce "Volume Force 2 - Acoustic streaming" on domains 1 | F = {F_streaming_x, F_streaming_y, 0}
    prpc1: PressurePointConstraint on points 3

Multiphysics
  nirf1: NonIsothermalReactingFlow "Reacting Flow 1: He" on all domains
    Fluid_physics = spf
    Species_physics = tcs
    Chemistry_physics = chem
    Heat_physics = none
  nirf2: NonIsothermalReactingFlow "Reacting Flow 2: N2O" on all domains
    Fluid_physics = spf
    Species_physics = tcs2
    Chemistry_physics = chem2
    Heat_physics = none
  nirf3: NonIsothermalReactingFlow "Reacting Flow 3: CH4" on all domains
    Fluid_physics = spf
    Species_physics = tcs3
    Chemistry_physics = chem3
    Heat_physics = none
  nirf4: NonIsothermalReactingFlow "Reacting Flow 4: H2" on all domains
    Fluid_physics = spf
    Species_physics = tcs4
    Chemistry_physics = chem4
    Heat_physics = none
  nirf5: NonIsothermalReactingFlow "Reacting Flow 5: CO2" on all domains
    Fluid_physics = spf
    Species_physics = tcs5
    Chemistry_physics = chem5
    Heat_physics = none
  nirf6: NonIsothermalReactingFlow "Reacting Flow 6: Xe" on all domains
    Fluid_physics = spf
    Species_physics = tcs6
    Chemistry_physics = chem6
    Heat_physics = none

Mesh
  mesh1 "Mesh 1"
    size: MeshSizeDefault | table = cfd; hmax = lam_min/30; hmin = 4.0000E-4; hgrad = 1.2; hauto = 6; custom = on
    ftri1: FreeTri "Free Triangular 1" on remaining entities

Studies
  std3 "Study 1.1 - focused field - offset He"
    time: Transient "Time Dependent"
      tlist = range(0,0.002,0.1)
      solve for = {chem, tcs, acpr, spf, comp1}
      disabledphysics = {acpr/cwr1/ipf2, acpr/fpam2, chem2, tcs2, tcs2/init2, tcs5, tcs4, tcs3, chem5, chem4, chem3, acpr/fpam5, acpr/fpam4, acpr/fpam3, chem6, tcs6, acpr/fpam6}
      disabledcoupling = {nirf2, nirf5, nirf4, nirf3, nirf6}
      activateCoupling = {nirf1, on, nirf2, off, nirf3, off, nirf4, off, nirf5, off, nirf6, off}
  std4 "Study 1.2 - focused field - offset N2O"
    time: Transient "Time Dependent"
      tlist = range(0,0.002,0.5)
      solve for = {chem2, tcs2, acpr, spf, comp1}
      disabledphysics = {tcs2/init2, tcs/init3, tcs5, tcs4, tcs3, tcs, chem5, chem3, chem, acpr/fpam5, acpr/fpam4, acpr/fpam3, chem4, acpr/cwr1/ipf2, acpr/fpam6, tcs6, chem6}
      disabledcoupling = {nirf5, nirf4, nirf3, nirf1, nirf6}
      activateCoupling = {nirf1, off, nirf2, on, nirf3, off, nirf4, off, nirf5, off, nirf6, off}
  std9 "Study 1.3 - focused field - offset CH4"
    time: Transient "Time Dependent"
      tlist = range(0,0.002,0.1)
      solve for = {chem3, tcs3, acpr, spf, comp1}
      disabledphysics = {acpr/fpam2, tcs2, chem2, tcs2/init2, tcs/init2, acpr/cwr1/ipf2, tcs5, tcs4, tcs, chem5, chem4, chem, acpr/fpam4, acpr/fpam5, chem6, tcs6, acpr/fpam6}
      disabledcoupling = {nirf2, nirf5, nirf4, nirf1, nirf6}
      activateCoupling = {nirf1, off, nirf2, off, nirf3, on, nirf4, off, nirf5, off, nirf6, off}
  std10 "Study 1.4 - focused field - offset H2"
    time: Transient "Time Dependent"
      tlist = range(0,0.002,0.1)
      solve for = {chem4, tcs4, acpr, spf, comp1}
      disabledphysics = {acpr/fpam2, tcs2, chem2, tcs2/init2, tcs/init2, tcs5, tcs3, tcs, chem5, chem3, chem, acpr/fpam5, acpr/cwr1/ipf2, acpr/fpam6, acpr/fpam3, tcs6, chem6}
      disabledcoupling = {nirf2, nirf5, nirf3, nirf1, nirf6}
      activateCoupling = {nirf1, off, nirf2, off, nirf3, off, nirf4, on, nirf5, off, nirf6, off}
  std13 "Study 1.5 - focused field - offset CO2"
    time: Transient "Time Dependent"
      tlist = range(0,0.002,0.5)
      solve for = {chem5, tcs5, acpr, spf, comp1}
      disabledphysics = {acpr/fpam2, tcs2, chem2, tcs2/init2, tcs/init3, acpr/cwr1/ipf2, tcs4, tcs3, tcs, chem4, chem3, chem, chem6, tcs6, acpr/fpam6}
      disabledcoupling = {nirf2, nirf4, nirf3, nirf1, nirf6}
      activateCoupling = {nirf1, off, nirf2, off, nirf3, off, nirf4, off, nirf5, on, nirf6, off}
  std5 "Study 1.6 - focused field - offset Xe"
    time: Transient "Time Dependent"
      tlist = range(0,0.002,0.5)
      disabledphysics = {chem, tcs, tcs/init2, tcs/init3, tcs2/init3, tcs5, tcs4, tcs3, tcs2, chem5, chem4, chem3, chem2, acpr/cwr1/ipf2}
      disabledcoupling = {nirf1, nirf5, nirf4, nirf3, nirf2}
      activateCoupling = {nirf1, off, nirf2, off, nirf3, off, nirf4, off, nirf5, off, nirf6, on}
  std7 "Study 2.1 - focused field - offset He, diffusion only"
    time: Transient "Time Dependent"
      tlist = range(0,0.002,0.1)
      solve for = {chem, tcs, acpr, spf, comp1}
      disabledphysics = {tcs2/init2, acpr/cwr1/ipf2, tcs6, tcs5, tcs4, tcs3, tcs2, chem6, chem5, chem4, chem3, chem2, spf/vf2, spf/vf1, acpr/fpam6, acpr/fpam5, acpr/fpam4, acpr/fpam3, acpr/fpam2}
      disabledcoupling = {nirf6, nirf5, nirf4, nirf3, nirf2}
      activateCoupling = {nirf1, on, nirf2, off, nirf3, off, nirf4, off, nirf5, off, nirf6, off}
  std14 "Study 2.2 - focused field - offset N2O, diffusion only"
    time: Transient "Time Dependent"
      tlist = range(0,0.002,0.4)
      disabledphysics = {chem, tcs, tcs/init2, tcs/init3, acpr/cwr1/ipf2, tcs6, tcs5, tcs4, tcs3, chem6, chem5, chem4, chem3, spf/vf2, spf/vf1, acpr/fpam6, acpr/fpam5, acpr/fpam4, acpr/fpam3}
      disabledcoupling = {nirf1, nirf6, nirf5, nirf4, nirf3}
      activateCoupling = {nirf1, off, nirf2, on, nirf3, off, nirf4, off, nirf5, off, nirf6, off}

Solver configurations
  sol3 "Solution 3" (study std3)
    v1: Variables "Dependent Variables 1"
    t1: Time "Time-Dependent Solver 1"
      tlist = range(0,0.002,0.1)
      rtol = 1.0E-4
      atolglobalfactor = 0.05
      atolmethod = {comp1_p1, global, comp1_p2, scaled, comp1_u2, global, comp1_He_1, global}
      atolfactor = {comp1_p1, 0.1, comp1_p2, 1, comp1_u2, 0.1, comp1_He_1, 0.1}
      maxorder = 2
      stabcntrl = on
      bwinitstepfrac = 0.01
      estrat = exclude
      d1: Direct "Direct, fluid flow variables (spf)" | linsolver = pardiso; pivotperturb = 1.0E-13
      se1: Segregated | segterm = itertol; segiter = 20
        ssDef: SegregatedStep | segvar = {comp1_p1}
        ss1: SegregatedStep | segvar = {comp1_p2, comp1_u2}
        tcs1: SegregatedStep "Segregated Step 1a" | segvar = {comp1_He_1}
        tcs61: SegregatedStep
  sol4 "Solution 4" (study std4)
    v1: Variables "Dependent Variables 1"
    t1: Time "Time-Dependent Solver 1"
      tlist = range(0,0.002,0.5)
      rtol = 1.0E-4
      atolglobalfactor = 0.05
      atolmethod = {comp1_p1, global, comp1_p2, scaled, comp1_u2, global, comp1_N2O_2, global}
      atolfactor = {comp1_p1, 0.1, comp1_p2, 1, comp1_u2, 0.1, comp1_N2O_2, 0.1}
      maxorder = 2
      stabcntrl = on
      bwinitstepfrac = 0.01
      estrat = exclude
      d1: Direct "Direct (Merged)" | linsolver = pardiso; pivotperturb = 1.0E-13
      se1: Segregated | segterm = itertol; segiter = 20
        ssDef: SegregatedStep | segvar = {comp1_p1}
        ss1: SegregatedStep | segvar = {comp1_p2, comp1_u2}
        tcs31: SegregatedStep | segvar = {comp1_N2O_2}
        tcs51: SegregatedStep
        tcs41: SegregatedStep
  sol5 "Solution 5" (study std5)
    v1: Variables "Dependent Variables 1"
    t1: Time "Time-Dependent Solver 1"
      tlist = range(0,0.002,0.5)
      rtol = 1.0E-4
      atolglobalfactor = 0.05
      atolmethod = {comp1_p1, global, comp1_p2, scaled, comp1_u2, global, comp1_Xe, global}
      atolfactor = {comp1_p1, 0.1, comp1_p2, 1, comp1_u2, 0.1, comp1_Xe, 0.1}
      maxorder = 2
      stabcntrl = on
      bwinitstepfrac = 0.01
      estrat = exclude
      dDef: Direct | linsolver = pardiso
      se1: Segregated | segterm = itertol; segiter = 20
        ss1: SegregatedStep "Pressure Acoustics, Frequency Domain" | subdamp = 0.8; subjtech = once
        ss2: SegregatedStep "Velocity U2, Pressure P2" | linsolver = d1; subdamp = 0.8; subjtech = once
        tcs61: SegregatedStep | segvar = {comp1_Xe}; linsolver = d1
        tcs31: SegregatedStep | linsolver = d1
        tcs51: SegregatedStep | linsolver = d1
        tcs41: SegregatedStep | linsolver = d1
      d1: Direct "Direct, fluid flow variables (spf)" | linsolver = pardiso; pivotperturb = 1.0E-13
  sol7 "Solution 7" (study std7)
    v1: Variables "Dependent Variables 1"
    t1: Time "Time-Dependent Solver 1"
      tlist = range(0,0.002,0.1)
      rtol = 1.0E-4
      atolglobalfactor = 0.05
      atolmethod = {comp1_p1, global, comp1_p2, scaled, comp1_u2, global, comp1_He_1, global}
      atolfactor = {comp1_p1, 0.1, comp1_p2, 1, comp1_u2, 0.1, comp1_He_1, 0.1}
      maxorder = 2
      stabcntrl = on
      bwinitstepfrac = 0.01
      estrat = exclude
      dDef: Direct | linsolver = pardiso
      se1: Segregated | segterm = itertol; segiter = 20
        ss1: SegregatedStep "Pressure Acoustics, Frequency Domain" | subdamp = 0.8; subjtech = once
        ss2: SegregatedStep "Velocity U2, Pressure P2" | linsolver = d1; subdamp = 0.8; subjtech = once
        tcs71: SegregatedStep | segvar = {comp1_He_1}; linsolver = d1
        tcs61: SegregatedStep | linsolver = d1
        tcs31: SegregatedStep | linsolver = d1
        tcs51: SegregatedStep | linsolver = d1
        tcs41: SegregatedStep | linsolver = d1
      d1: Direct "Direct, fluid flow variables (spf)" | linsolver = pardiso; pivotperturb = 1.0E-13
  sol9 "Solution 9" (study std9)
    v1: Variables "Dependent Variables 1"
    t1: Time "Time-Dependent Solver 1"
      tlist = range(0,0.002,0.1)
      rtol = 1.0E-4
      atolglobalfactor = 0.05
      atolmethod = {comp1_CH4, global, comp1_p1, global, comp1_p2, scaled, comp1_u2, global}
      atolfactor = {comp1_CH4, 0.1, comp1_p1, 0.1, comp1_p2, 1, comp1_u2, 0.1}
      maxorder = 2
      stabcntrl = on
      bwinitstepfrac = 0.01
      estrat = exclude
      dDef: Direct | linsolver = pardiso
      se1: Segregated | segterm = itertol; segiter = 20
        ss1: SegregatedStep "Pressure Acoustics, Frequency Domain" | subdamp = 0.8; subjtech = once
        ss2: SegregatedStep "Velocity U2, Pressure P2"
          segvar = {comp1_u2, comp1_p2, comp1_CH4}
          linsolver = d1
          subdamp = 0.8
          subjtech = once
        tcs61: SegregatedStep | linsolver = d1
      d1: Direct "Direct, fluid flow variables (spf)" | linsolver = pardiso; pivotperturb = 1.0E-13
  sol10 "Solution 10" (study std10)
    v1: Variables "Dependent Variables 1"
    t1: Time "Time-Dependent Solver 1"
      tlist = range(0,0.002,0.1)
      rtol = 1.0E-4
      atolglobalfactor = 0.05
      atolmethod = {comp1_H2, global, comp1_p1, global, comp1_p2, scaled, comp1_u2, global}
      atolfactor = {comp1_H2, 0.1, comp1_p1, 0.1, comp1_p2, 1, comp1_u2, 0.1}
      maxorder = 2
      stabcntrl = on
      bwinitstepfrac = 0.01
      estrat = exclude
      dDef: Direct | linsolver = pardiso
      se1: Segregated | segterm = itertol; segiter = 20
        ss1: SegregatedStep "Pressure Acoustics, Frequency Domain" | subdamp = 0.8; subjtech = once
        ss2: SegregatedStep "Velocity U2, Pressure P2"
          segvar = {comp1_u2, comp1_p2, comp1_H2}
          linsolver = d1
          subdamp = 0.8
          subjtech = once
        tcs61: SegregatedStep | linsolver = d1
      d1: Direct "Direct, fluid flow variables (spf)" | linsolver = pardiso; pivotperturb = 1.0E-13
  sol13 "Solution 13" (study std13)
    v1: Variables "Dependent Variables 1"
    t1: Time "Time-Dependent Solver 1"
      tlist = range(0,0.002,0.5)
      rtol = 1.0E-4
      atolglobalfactor = 0.05
      atolmethod = {comp1_CO2, global, comp1_p1, global, comp1_p2, scaled, comp1_u2, global}
      atolfactor = {comp1_CO2, 0.1, comp1_p1, 0.1, comp1_p2, 1, comp1_u2, 0.1}
      maxorder = 2
      stabcntrl = on
      bwinitstepfrac = 0.01
      estrat = exclude
      dDef: Direct | linsolver = pardiso
      se1: Segregated | segterm = itertol; segiter = 20
        ss1: SegregatedStep "Pressure Acoustics, Frequency Domain" | subdamp = 0.8; subjtech = once
        ss2: SegregatedStep "Velocity U2, Pressure P2"
          segvar = {comp1_u2, comp1_p2, comp1_CO2}
          linsolver = d1
          subdamp = 0.8
          subjtech = once
        tcs61: SegregatedStep | linsolver = d1
      d1: Direct "Direct, fluid flow variables (spf)" | linsolver = pardiso; pivotperturb = 1.0E-13
  sol15 "Solution 15" (study std14)
    v1: Variables "Dependent Variables 1"
    t1: Time "Time-Dependent Solver 1"
      tlist = range(0,0.002,0.4)
      rtol = 1.0E-4
      atolglobalfactor = 0.05
      atolmethod = {comp1_N2O_2, global, comp1_p1, global, comp1_p2, scaled, comp1_u2, global}
      atolfactor = {comp1_N2O_2, 0.1, comp1_p1, 0.1, comp1_p2, 1, comp1_u2, 0.1}
      maxorder = 2
      stabcntrl = on
      bwinitstepfrac = 0.01
      estrat = exclude
      dDef: Direct | linsolver = pardiso
      se1: Segregated | segterm = itertol; segiter = 20
        ss1: SegregatedStep "Pressure Acoustics, Frequency Domain" | subdamp = 0.8; subjtech = once
        ss2: SegregatedStep "Velocity U2, Pressure P2"
          segvar = {comp1_u2, comp1_p2, comp1_N2O_2}
          linsolver = d1
          subdamp = 0.8
          subjtech = once
      d1: Direct "Direct, fluid flow variables (spf)" | linsolver = pardiso; pivotperturb = 1.0E-13

Datasets
  dset3: Solution | solution = sol3
  dset4: Solution | solution = sol4
  dset9: Solution | solution = sol9
  dset10: Solution | solution = sol10
  dset13: Solution | solution = sol13
  dset5: Solution | solution = sol5
  dset7: Solution | solution = sol7
  dset15: Solution | solution = sol15

Plots
  pg39: PlotGroup2D "1.1: Helium" | data = dset3; prefixintitle = He offset by lambda/5.
    surf1: Surface "Density" | expr = acpr.rho; suffixintitle = and F_aco (arrows)
    arws2: ArrowSurface | expr = {F_aco_x, F_aco_y}; xnumber = 30; ynumber = 30
    surf2: Surface "Pressure" | expr = acpr.absp; unit = kPa
      def1: Deform "Deformation 1" | expr = {41, 0}
    surf3: Surface "Flow" | expr = spf.U; unit = mm/s; suffixintitle = and direction (arrows)
      def1: Deform "Deformation 1" | expr = {82, 0}
    arws3: ArrowSurface | expr = {u2, v2}; xnumber = 30; ynumber = 30
      def1: Deform "Deformation 1" | expr = {82, 0}
  pg40: PlotGroup2D "1.2: N2O" | data = dset4; prefixintitle = N2O offset by lambda/5.
    surf1: Surface "Density" | expr = acpr.rho; suffixintitle = and F_aco (arrows)
    arws2: ArrowSurface | expr = {F_aco_x, F_aco_y}; xnumber = 30; ynumber = 30
    surf2: Surface "Pressure" | expr = acpr.absp; unit = kPa
      def1: Deform "Deformation 1" | expr = {41, 0}
    surf3: Surface "Flow" | expr = spf.U; unit = mm/s; suffixintitle = and direction (arrows)
      def1: Deform "Deformation 1" | expr = {82, 0}
    arws3: ArrowSurface | expr = {u2, v2}; xnumber = 30; ynumber = 30
      def1: Deform "Deformation 1" | expr = {82, 0}
  pg41: PlotGroup2D "1.3: CH4" | data = dset9; prefixintitle = CH4 offset by lambda/5.
    surf1: Surface "Density" | expr = acpr.rho; suffixintitle = and F_aco (arrows)
    arws2: ArrowSurface | expr = {F_aco_x, F_aco_y}; xnumber = 30; ynumber = 30
    surf2: Surface "Pressure" | expr = acpr.absp; unit = kPa
      def1: Deform "Deformation 1" | expr = {41, 0}
    surf3: Surface "Flow" | expr = spf.U; unit = mm/s; suffixintitle = and direction (arrows)
      def1: Deform "Deformation 1" | expr = {82, 0}
    arws3: ArrowSurface | expr = {u2, v2}; xnumber = 30; ynumber = 30
      def1: Deform "Deformation 1" | expr = {82, 0}
  pg28: PlotGroup2D "1.4: H2" | data = dset10; prefixintitle = H2 offset by lambda/5.
    surf1: Surface "Density" | expr = acpr.rho; suffixintitle = and F_aco (arrows)
    arws2: ArrowSurface | expr = {F_aco_x, F_aco_y}; xnumber = 30; ynumber = 30
    surf2: Surface "Pressure" | expr = acpr.absp; unit = kPa
      def1: Deform "Deformation 1" | expr = {41, 0}
    surf3: Surface "Flow" | expr = spf.U; unit = mm/s; suffixintitle = and direction (arrows)
      def1: Deform "Deformation 1" | expr = {82, 0}
    arws3: ArrowSurface | expr = {u2, v2}; xnumber = 30; ynumber = 30
      def1: Deform "Deformation 1" | expr = {82, 0}
  pg42: PlotGroup2D "1.5: CO2" | data = dset13; prefixintitle = CO2 offset by lambda/5.
    surf1: Surface "Density" | expr = acpr.rho; suffixintitle = and F_aco (arrows)
    arws2: ArrowSurface | expr = {F_aco_x, F_aco_y}; xnumber = 30; ynumber = 30
    surf2: Surface "Pressure" | expr = acpr.absp; unit = kPa
      def1: Deform "Deformation 1" | expr = {41, 0}
    surf3: Surface "Flow" | expr = spf.U; unit = mm/s; suffixintitle = and direction (arrows)
      def1: Deform "Deformation 1" | expr = {82, 0}
    arws3: ArrowSurface | expr = {u2, v2}; xnumber = 30; ynumber = 30
      def1: Deform "Deformation 1" | expr = {82, 0}
  pg43: PlotGroup2D "1.6: Xe" | data = dset5; prefixintitle = Xe offset by lambda/5.
    surf1: Surface "Density" | expr = acpr.rho; suffixintitle = and F_aco (arrows)
    arws2: ArrowSurface | expr = {F_aco_x, F_aco_y}; xnumber = 30; ynumber = 30
    surf2: Surface "Pressure" | expr = acpr.absp; unit = kPa
      def1: Deform "Deformation 1" | expr = {41, 0}
    surf3: Surface "Flow" | expr = spf.U; unit = mm/s; suffixintitle = and direction (arrows)
      def1: Deform "Deformation 1" | expr = {82, 0}
    arws3: ArrowSurface | expr = {u2, v2}; xnumber = 30; ynumber = 30
      def1: Deform "Deformation 1" | expr = {82, 0}
  pg59: PlotGroup2D "2.2: N2O diffusion" | data = dset15; typeintitle = off; descriptionintitle = off; unitintitle = off
    surf1: Surface "Density" | expr = acpr.rho
      def1: Deform "Deformation 1" | expr = {20, }