// COMSOL Multiphysics 6.4.0.429 model "2D_PARTICLE_DYNAMICS.mph"
// Outline of the model tree

Parameters
  r_pipe = (95.9/2)[mm]+b0*lam0  // Domain radius
  b0 = 0.5
  d0 = 0.936e-6[m]  // Transducer normal displacement
  c0 = 343[m/s]
  f0 = 40[kHz]
  lam0 = c0/f0
  d_particle = 100e-6[m]  // Particle diameter
  rhop = 3700[kg/m^3]  // Particle density
  cp1 = 5968[m/s]  // Particle longitudinal speed of sound
  cs1 = 3764[m/s]  // Particle shear speed of sound
  T_amb = 293.15[K]
  ch0 = 1  // Chirality
  M0 = 30  // Meshing

Couplings
  maxop1: Maximum on domains 1

Geometry
  geom1 "Geometry 1" (2D, length unit m)
    c1: Circle | r = r_pipe
    fin: Finalize "Form Union"
  pgeom_fpt "Geometry" (1D, length unit m)
    pt1: Point

Materials
  mat1: Common "Air" on all domains
    def: def "Basic"
      thermalexpansioncoefficient = alpha_p(pA,T)
      molarmass = 0.02897[kg/mol]
      bulkviscosity = muB(T)
      relpermeability = 1
      relpermittivity = 1
      dynamicviscosity = eta(T)
      ratioofspecificheat = 1.4
      electricconductivity = 0[S/m]
      heatcapacity = Cp(T)
      density = rho(pA,T)
      thermalconductivity = k(T)
      soundspeed = cs(T)
      eta: Piecewise | arg = T; pieces = {200.0, 1600.0, -8.38278E-7+8.35717342E-8*T^1-7.69429583E-11*T^2+4.6437266E-14*T^3-1.06585607E-17*T^4}; argunit = K; fununit = Pa*s
      Cp: Piecewise | arg = T; pieces = {200.0, 1600.0, 1047.63657-0.372589265*T^1+9.45304214E-4*T^2-6.02409443E-7*T^3+1.2858961E-10*T^4}; argunit = K; fununit = J/(kg*K)
      rho: Analytic | expr = pA*0.02897/R_const[K*mol/J]/T; args = {pA, T}; fununit = kg/m^3; argunit = {Pa, K}
      k: Piecewise | arg = T; pieces = {200.0, 1600.0, -0.00227583562+1.15480022E-4*T^1-7.90252856E-8*T^2+4.11702505E-11*T^3-7.43864331E-15*T^4}; argunit = K; fununit = W/(m*K)
      cs: Analytic | expr = sqrt(1.4*R_const[K*mol/J]/0.02897*T); args = T; fununit = m/s; argunit = K
      an1: Analytic | funcname = alpha_p; expr = -1/rho(pA,T)*d(rho(pA,T),T); args = {pA, T}; fununit = 1/K; argunit = {Pa, K}
      an2: Analytic "Analytic 2a" | funcname = muB; expr = 0.6*eta(T); args = T; fununit = Pa*s; argunit = K
    RefractiveIndex: RefractiveIndex
      n = 1
      ki = 0
    NonlinearModel: NonlinearModel
      BA = def.gamma-1
    idealGas: idealGas
      Rs = R_const/Mn
      heatcapacity = Cp(T)
      ratioofspecificheat = 1.4
      molarmass = 0.02897[kg/mol]
      Cp: Piecewise | arg = T; pieces = {200.0, 1600.0, 1047.63657-0.372589265*T^1+9.45304214E-4*T^2-6.02409443E-7*T^3+1.2858961E-10*T^4}; argunit = K; fununit = J/(kg*K)

Physics
  acpr2: PressureAcoustics "Pressure Acoustics, Frequency Domain, m=0 & m=1" on all domains
    dependent variable p3
    EquationForm.form = Frequency
    EquationForm.freq_src = userdef
    EquationForm.freq = f0
    fpam1: FrequencyPressureAcousticsModel "Pressure Acoustics 1" (default)
      FluidModel = Viscothermal
      minput_temperature = T_amb
    shb1: SoundHard "Sound Hard Boundary (Wall) 1" (default)
    init1: init "Initial Values 1" (default)
    ndisp2: NormalDisplacement "Normal Displacement, Vortex 1.1" on boundaries 4 | ndisp = d0*exp(i*ch0*atan(y/x))
    ndisp3: NormalDisplacement "Normal Displacement, Vortex 1.2" on boundaries 2 | ndisp = d0*exp(i*ch0*(atan(y/x)+pi))
    ndisp4: NormalDisplacement "Normal Displacement, Vortex 1.3" on boundaries 1 | ndisp = d0*exp(i*ch0*(atan(y/x)+pi))
    ndisp5: NormalDisplacement "Normal Displacement, Vortex 1.4" on boundaries 3 | ndisp = d0*exp(i*ch0*(atan(y/x)+2*pi))
  acpr3: PressureAcoustics "Pressure Acoustics, Frequency Domain, m=+-1" on all domains
    dependent variable p
    EquationForm.form = Frequency
    EquationForm.freq_src = userdef
    EquationForm.freq = f0
    fpam1: FrequencyPressureAcousticsModel "Pressure Acoustics 1" (default)
      FluidModel = Viscothermal
      minput_temperature = T_amb
    shb1: SoundHard "Sound Hard Boundary (Wall) 1" (default)
    init1: init "Initial Values 1" (default)
    ndisp6: NormalDisplacement "Normal Displacement, Petal 1.1" on boundaries 4 | ndisp = d0*cos(atan(y/x))
    ndisp7: NormalDisplacement "Normal Displacement, Petal 1.2" on boundaries 2 | ndisp = d0*cos(atan(y/x)+pi)
    ndisp8: NormalDisplacement "Normal Displacement, Petal 1.3" on boundaries 1 | ndisp = d0*cos(atan(y/x)+pi)
    ndisp9: NormalDisplacement "Normal Displacement, Petal 1.4" on boundaries 3 | ndisp = d0*cos(atan(y/x)+2*pi)
  spf: LaminarFlow on all domains
    dependent variable u = {u, v, w}
    PhysicalModelProperty.Compressibility = WeaklyCompressible
    fp1: FluidProperties (default)
    init1: init "Initial Values 1" (default)
    wallbc1: WallBC "Wall 1" (default) | zeta = (-0.1)[V]
    prpc1: PressurePointConstraint on points 4
  fpt: FluidParticleTracing "Particle Tracing for Fluid Flow" on all domains
    dependent variable q = {qx, qy, qz}
    wall1: Wall (default)
    pp1: ParticleProperties | dp = d_particle; rhop_mat = userdef; rhop = rhop; gammap_mat = userdef; gammap = 1
    relg1: ReleaseGrid "Release from Grid 1" (disabled) | x0 = {range(-1[mm],0.5[mm],1[mm]), range(-1[mm],0.5[mm],1[mm])}
    relf1: ReleaseFromDataFile
      Filename = C:UsersMarikaDownloadsinitial_particle_coordinates.txt
      ModelRes = res89
      FilenameShort = initial_particle_coordinates.txt
    acof1: AcoustophoreticForce "Acoustophoretic Radiation Force 1" on domains 1
      uaco_src = root.comp1.acpr2.vx
      cp = cp1
      cs = cs1
      FrequencySpecification = UserDefined
      freq = f0
      pA_src = root.comp1.p3
    acof2: AcoustophoreticForce "Acoustophoretic Radiation Force 2" on domains 1
      uaco_src = root.comp1.acpr3.vx
      cp = cp1
      cs = cs1
      FrequencySpecification = UserDefined
      freq = f0
      pA_src = root.comp1.p
    df1: DragForce on domains 1 | u_src = root.comp1.u; k = 10*1e-6[m^2/s^2]; ep = 10*1e-6[m^2/s^3]
    lf1: LiftForce on domains 1 | u_src = root.comp1.u

Multiphysics
  asdc2: AcousticStreamingDomainCoupling on domains 1 | Source_physics = acpr2; Destination_physics = spf
  asdc3: AcousticStreamingDomainCoupling on domains 1 | Source_physics = acpr3; Destination_physics = spf

Mesh
  mesh1 "Mesh 1"
    size: MeshSizeDefault | hmax = 0.007; hmin = 3.13E-5; hcurve = 0.3; hgrad = 1.3
    size1: Size on domains 1 | hmax = lam0/M0; custom = on
    ftri1: FreeTri "Free Triangular 1" on domains 1 | smoothcontrol = on

Studies
  std10 "Study 1: Acoustics & flow, Vortex m=0 and m=1"
    param: Parametric "Parametric Sweep"
      pname = {b0, ch0, d0}
      plistarr = {"0.5, 0.3", "0, 1", "1.362e-6, 1.166e-6"}
      punit = {, , m}
    freq: Frequency "Frequency Domain"
      plist = f0
      solve for = {acpr2, spf, comp1}
      disabledphysics = fpt
      activateCoupling = {asdc2, on, asdc3, off}
    stat: Stationary | solve for = {spf, comp1}; disabledphysics = fpt; activateCoupling = {asdc2, on, asdc3, off}
  std12 "Study 2: Acoustics & flow, Petal field m=+-1"
    param: Parametric "Parametric Sweep" | pname = {ch0, b0, d0}; plistarr = {1, 0.3, 1.17e-6}; punit = {, , m}
    freq: Frequency "Frequency Domain" | plist = f0; solve for = {acpr3, comp1}
    stat: Stationary | solve for = {spf, fpt, comp1}; activateCoupling = {asdc2, off, asdc3, on}
  std20 "Study 3: Particle tracing, vortex (m=0), size sweep"
    param: Parametric "Parametric Sweep"
      sweeptype = filled
      pname = d_particle
      plistarr = 25e-6, 100e-6, 200e-6
      punit = m
    time: Transient "Time Dependent"
      tlist = range(0,0.001,0.5)
      solve for = {fpt, comp1}
      disabledphysics = {acpr3, fpt/acof2}
      disabledcoupling = asdc3
      activateCoupling = {asdc2, off, asdc3, off}
      usesol = on
      notsolmethod = sol
      notstudy = std10
      notsol = sol273
  std16 "Study 4: Particle tracing, Vortex (m=1), size sweep"
    param: Parametric "Parametric Sweep"
      sweeptype = filled
      pname = d_particle
      plistarr = 25e-6, 100e-6, 200e-6
      punit = m
    time: Transient "Time Dependent"
      tlist = range(0,0.001,0.5)
      solve for = {fpt, comp1}
      disabledphysics = {fpt/acof2, acpr3}
      disabledcoupling = asdc3
      activateCoupling = {asdc2, off, asdc3, off}
      usesol = on
      notsolmethod = sol
      notstudy = std10
      notsol = sol273
  std17 "Study 5: Particle tracing, Petal (m=+-1), size sweep"
    param: Parametric "Parametric Sweep"
      sweeptype = filled
      pname = d_particle
      plistarr = 25e-6, 100e-6, 200e-6
      punit = m
    time: Transient "Time Dependent"
      tlist = range(0,0.001,0.5)
      solve for = {fpt, comp1}
      disabledphysics = {fpt/acof1, acpr2}
      disabledcoupling = asdc2
      activateCoupling = {asdc2, off, asdc3, off}
      usesol = on
      notsolmethod = sol
      notstudy = std12
      notsol = sol310

Solver configurations
  sol271 "Solution 271" (study std10)
    v1: Variables "Dependent Variables 1"
    s1: Stationary "Stationary Solver 1"
      dDef: Direct | linsolver = pardiso
      p1: Parametric | pname = freq; plistarr = f0; punit = Hz; pcontinuationmode = no
      fc1: FullyCoupled
    su1: StoreSolution "Solution Store 1"
    v2: Variables "Dependent Variables 2" | initmethod = sol; notsolmethod = sol
    s2: Stationary "Stationary Solver 2"
      dDef: Direct | linsolver = pardiso
      fcDef: FullyCoupled | ntermauto = itertol; ntolfact = 0.5; niter = 20
  sol272 "Solution Store 1" (study std10)
  sol273 "Parametric Solutions 6" (study std10)
  sol308 "Solution 308" (study std12)
    v1: Variables "Dependent Variables 1"
    s1: Stationary "Stationary Solver 1"
      dDef: Direct | linsolver = pardiso
      p1: Parametric | pname = freq; plistarr = f0; punit = Hz; pcontinuationmode = no
      fc1: FullyCoupled
    su1: StoreSolution "Solution Store 2"
    v2: Variables "Dependent Variables 2" | initmethod = sol; notsolmethod = sol
    s2: Stationary "Stationary Solver 2"
      fc1: FullyCoupled | linsolver = d1; initstep = 0.01; maxiter = 100
      d1: Direct "Direct, fluid flow variables (spf)" | linsolver = pardiso; pivotperturb = 1.0E-13
  sol309 "Solution Store 2" (study std12)
  sol310 "Parametric Solutions 5" (study std12)
  sol372 "Solution 372" (study std16)
    v1: Variables "Dependent Variables 1" | resscalemethod = manual; notsolmethod = sol
    t1: Time "Time-Dependent Solver 1"
      tlist = range(0,0.001,0.5)
      rtol = 1.0E-5
      timemethod = genalpha
      estrat = exclude
      tstepsgenalpha = strict
      initialstepgenalpha = 0.0001
      fc1: FullyCoupled | ntolfact = 0.1
      i1: Iterative
        ja1: Jacobi
  sol373 "Solution 373" (study std17)
    v1: Variables "Dependent Variables 1" | resscalemethod = manual; notsolmethod = sol
    t1: Time "Time-Dependent Solver 1"
      tlist = range(0,0.001,0.5)
      rtol = 1.0E-5
      timemethod = genalpha
      estrat = exclude
      tstepsgenalpha = strict
      fc1: FullyCoupled | ntolfact = 0.1
      i1: Iterative
        ja1: Jacobi
  sol377 "Parametric Solutions 9" (study std16)
  sol421 "Solution 421" (study std20)
    // same settings as sol373
  sol422 "Parametric Solutions 8" (study std20)
  sol450 "Parametric Solutions 10" (study std17)
  sol481 "ch0=1, b0=0.3, d0=1.17E-6" (study std12)

Datasets
  dset26: Solution | solution = sol271
  dset27: Solution | solution = sol272
  dset28: Solution | solution = sol273
  dset35: Solution | solution = sol308
  dset36: Solution | solution = sol309
  dset37: Solution | solution = sol310
  dset45: Solution | solution = sol372
  dset46: Solution | solution = sol373
  part6: Particle | solution = sol450
  dset48: Solution | solution = sol377
  part8: Particle | solution = sol377
  dset52: Solution | solution = sol421
  dset53: Solution | solution = sol422
  part11: Particle | solution = sol422
  dset74: Solution | solution = sol481
  dset75: Solution | solution = sol481
  dset76: Solution | solution = sol481
  dset101: Solution | solution = sol450

Plots
  pg28: PlotGroup2D "Particle Trajectories, vortex m=0, size sweep" | data = part11
    traj1: ParticleTrajectories
      col1: Color "Color Expression 1" | expr = fpt.dp
      filt1: ParticleTrajectoriesFilter "Filter 1" | type = logical
    traj2: ParticleTrajectories | linetype = none; pointtype = point; pointradiusexpr = 0.0003
      col1: Color "Color Expression 1" | expr = fpt.dp
      filt1: ParticleTrajectoriesFilter "Filter 1" | type = logical
    surf1: Surface | expr = acpr2.absp_t
      filt1: Filter | expr = x > -0.01 && x < 0.01 && y > -0.01 && y < 0.01
  pg29: PlotGroup2D "Particle Trajectories, vortex m=1, size sweep" | data = part8
    traj1: ParticleTrajectories
      col1: Color "Color Expression 1" | expr = fpt.dp
      filt1: ParticleTrajectoriesFilter "Filter 1" | type = logical
    traj2: ParticleTrajectories | linetype = none; pointtype = point; pointradiusexpr = 0.0003
      col1: Color "Color Expression 1" | expr = fpt.dp
      filt1: ParticleTrajectoriesFilter "Filter 1" | type = logical
    surf1: Surface | expr = acpr2.absp_t
      filt1: Filter | expr = x > -0.01 && x < 0.01 && y > -0.01 && y < 0.01
  pg30: PlotGroup2D "Particle Trajectories, petal m=+-1, size sweep" | data = part6
    traj1: ParticleTrajectories
      col1: Color "Color Expression 1" | expr = fpt.dp
      filt1: ParticleTrajectoriesFilter "Filter 1" | type = logical
    traj2: ParticleTrajectories | linetype = none; pointtype = point; pointradiusexpr = 0.0003
      col1: Color "Color Expression 1" | expr = fpt.dp
      filt1: ParticleTrajectoriesFilter "Filter 1" | type = logical
    surf1: Surface | expr = acpr3.absp_t
      filt1: Filter | expr = x > -0.01 && x < 0.01 && y > -0.01 && y < 0.01